// SBML level 2 version 2

model Hepatocyte_glycolysis_glycogenic()

  // Compartments:
  compartment compartment;

  // Species:
  species $atp in compartment = 2.8;
  species $adp in compartment = 0.8;
  species $amp in compartment = 0.16;
  species utp in compartment = 0.5264344;
  species udp in compartment = 0.1509163;
  species gtp in compartment = 0.29;
  species gdp in compartment = 0.1;
  species $nad in compartment = 1.22;
  species $nadh in compartment = 0.00056;
  species $p in compartment = 5;
  species pp in compartment = 0.001867432;
  species $h2o in compartment = 1;
  species $co2 in compartment = 5;
  species $h in compartment = 1;
  species glc1p in compartment = 0.005668251;
  species udpglc in compartment = 0.06264936;
  species $glyglc in compartment = 250;
  species glc in compartment = 7.963219;
  species glc6p in compartment = 0.09398903;
  species fru6p in compartment = 0.04848827;
  species fru16bp in compartment = 1.40847;
  species fru26bp in compartment = 0.001817686;
  species grap in compartment = 0.002726948;
  species dhap in compartment = 0.05039856;
  species bpg13 in compartment = 2.443902;
  species pg3 in compartment = 4.851451;
  species pg2 in compartment = 0.8771945;
  species pep in compartment = 0.04648978;
  species pyr in compartment = 0.01714377;
  species oaa in compartment = 0.01;
  species lac in compartment = 1.808252e-6;
  species $glc_{ext} in compartment = 8;
  species $lac_{ext} in compartment = 1.2;
  species $co2_{mito} in compartment = 5;
  species $p_{mito} in compartment = 5;
  species oaa_{mito} in compartment = 0.0002462127;
  species pep_{mito} in compartment = 0.05305823;
  species $acoa_{mito} in compartment = 0.04;
  species pyr_{mito} in compartment = 0.003364733;
  species $cit_{mito} in compartment = 0.32;
  species $atp_{mito} in compartment = 2.8;
  species $adp_{mito} in compartment = 0.8;
  species gtp_{mito} in compartment = 0.3011829;
  species gdp_{mito} in compartment = 0.08881709;
  species $coa_{mito} in compartment = 0.055;
  species $nadh_{mito} in compartment = 0.24;
  species $nad_{mito} in compartment = 0.98;
  species $h_{mito} in compartment = 1;
  species $h2o_{mito} in compartment = 1;

  // Reactions:
  GLUT2: -> glc; ;
    u_R1 = 1; kC_R1 = 4.154318; kEQ_R1 = 1.036122; kM_R1_glc = 7.963219; kM_R1_glc_{ext} = 8;
  Glucokinase: $atp + glc -> $adp + glc6p; u_R2*(kC_R2*sqrt(kEQ_R2*kM_R2_atp*kM_R2_glc/kM_R2_adp/kM_R2_glc6p)*(atp/kM_R2_atp)*(glc/kM_R2_glc) - kC_R2/sqrt(kEQ_R2*kM_R2_atp*kM_R2_glc/kM_R2_adp/kM_R2_glc6p)*(adp/kM_R2_adp)*(glc6p/kM_R2_glc6p))/((1 + atp/kM_R2_atp)*(1 + glc/kM_R2_glc)*(1 + adp/kM_R2_adp)*(1 + glc6p/kM_R2_glc6p));
    u_R2 = 1; kC_R2 = 16.2136; kEQ_R2 = 0.003727785; kM_R2_atp = 2.8; kM_R2_adp = 0.8; kM_R2_glc = 7.963219; kM_R2_glc6p = 0.09398903;
  G6Pase: $h2o + glc6p -> $p + glc; u_R3*(kC_R3*sqrt(kEQ_R3*kM_R3_h2o*kM_R3_glc6p/kM_R3_p/kM_R3_glc)*(h2o/kM_R3_h2o)*(glc6p/kM_R3_glc6p) - kC_R3/sqrt(kEQ_R3*kM_R3_h2o*kM_R3_glc6p/kM_R3_p/kM_R3_glc)*(p/kM_R3_p)*(glc/kM_R3_glc))/((1 + h2o/kM_R3_h2o)*(1 + glc6p/kM_R3_glc6p)*(1 + p/kM_R3_p)*(1 + glc/kM_R3_glc));
    u_R3 = 1; kC_R3 = 12.3376; kEQ_R3 = 468.2868; kM_R3_p = 5; kM_R3_h2o = 1; kM_R3_glc = 7.963219; kM_R3_glc6p = 0.09398903;
  GPI: glc6p -> fru6p; u_R4*(kC_R4*sqrt(kEQ_R4*kM_R4_glc6p/kM_R4_fru6p)*(glc6p/kM_R4_glc6p) - kC_R4/sqrt(kEQ_R4*kM_R4_glc6p/kM_R4_fru6p)*(fru6p/kM_R4_fru6p))/((1 + glc6p/kM_R4_glc6p)*(1 + fru6p/kM_R4_fru6p));
    u_R4 = 1; kC_R4 = 3.472331; kEQ_R4 = 0.5369968; kM_R4_glc6p = 0.09398903; kM_R4_fru6p = 0.04848827;
  G16PI: glc1p -> glc6p; u_R5*(kC_R5*sqrt(kEQ_R5*kM_R5_glc1p/kM_R5_glc6p)*(glc1p/kM_R5_glc1p) - kC_R5/sqrt(kEQ_R5*kM_R5_glc1p/kM_R5_glc6p)*(glc6p/kM_R5_glc6p))/((1 + glc1p/kM_R5_glc1p)*(1 + glc6p/kM_R5_glc6p));
    u_R5 = 1; kC_R5 = 5.380049e-11; kEQ_R5 = 6.418784e-17; kM_R5_glc1p = 0.005668251; kM_R5_glc6p = 0.09398903;
  UPGase: utp + glc1p -> pp + udpglc; u_R6*(kC_R6*sqrt(kEQ_R6*kM_R6_utp*kM_R6_glc1p/kM_R6_pp/kM_R6_udpglc)*(utp/kM_R6_utp)*(glc1p/kM_R6_glc1p) - kC_R6/sqrt(kEQ_R6*kM_R6_utp*kM_R6_glc1p/kM_R6_pp/kM_R6_udpglc)*(pp/kM_R6_pp)*(udpglc/kM_R6_udpglc))/((1 + utp/kM_R6_utp)*(1 + glc1p/kM_R6_glc1p)*(1 + pp/kM_R6_pp)*(1 + udpglc/kM_R6_udpglc));
    u_R6 = 1; kC_R6 = 1.898937; kEQ_R6 = 0.04081129; kM_R6_utp = 0.5264344; kM_R6_pp = 0.001867432; kM_R6_glc1p = 0.005668251; kM_R6_udpglc = 0.06264936;
  PPase: pp + $h2o -> 2 $p; u_R7*(kC_R7*sqrt(kEQ_R7*kM_R7_pp*kM_R7_h2o/kM_R7_p^2)*(pp/kM_R7_pp)*(h2o/kM_R7_h2o) - kC_R7/sqrt(kEQ_R7*kM_R7_pp*kM_R7_h2o/kM_R7_p^2)*(p/kM_R7_p)^2)/((1 + pp/kM_R7_pp)*(1 + h2o/kM_R7_h2o)*(1 + p/kM_R7_p)^2);
    u_R7 = 1; kC_R7 = 1.898937; kEQ_R7 = 13935.01; kM_R7_p = 5; kM_R7_pp = 0.001867432; kM_R7_h2o = 1;
  GS: udpglc -> udp + $glyglc; u_R8*(kC_R8*sqrt(kEQ_R8*kM_R8_udpglc/kM_R8_udp/kM_R8_glyglc)*(udpglc/kM_R8_udpglc) - kC_R8/sqrt(kEQ_R8*kM_R8_udpglc/kM_R8_udp/kM_R8_glyglc)*(udp/kM_R8_udp)*(glyglc/kM_R8_glyglc))/((1 + udpglc/kM_R8_udpglc)*(1 + udp/kM_R8_udp)*(1 + glyglc/kM_R8_glyglc));
    u_R8 = 1; kC_R8 = 1.356384; kEQ_R8 = 626.8615; kM_R8_udp = 0.1509163; kM_R8_udpglc = 0.06264936; kM_R8_glyglc = 250;
  GP: $p + $glyglc -> glc1p; u_R9*(kC_R9*sqrt(kEQ_R9*kM_R9_p*kM_R9_glyglc/kM_R9_glc1p)*(p/kM_R9_p)*(glyglc/kM_R9_glyglc) - kC_R9/sqrt(kEQ_R9*kM_R9_p*kM_R9_glyglc/kM_R9_glc1p)*(glc1p/kM_R9_glc1p))/((1 + p/kM_R9_p)*(1 + glyglc/kM_R9_glyglc)*(1 + glc1p/kM_R9_glc1p));
    u_R9 = 1; kC_R9 = 0.2197386; kEQ_R9 = 4.7201e-6; kM_R9_p = 5; kM_R9_glc1p = 0.005668251; kM_R9_glyglc = 250;
  NTK__GTP_: $atp + gdp -> $adp + gtp; u_R10*(kC_R10*sqrt(kEQ_R10*kM_R10_atp*kM_R10_gdp/kM_R10_adp/kM_R10_gtp)*(atp/kM_R10_atp)*(gdp/kM_R10_gdp) - kC_R10/sqrt(kEQ_R10*kM_R10_atp*kM_R10_gdp/kM_R10_adp/kM_R10_gtp)*(adp/kM_R10_adp)*(gtp/kM_R10_gtp))/((1 + atp/kM_R10_atp)*(1 + gdp/kM_R10_gdp)*(1 + adp/kM_R10_adp)*(1 + gtp/kM_R10_gtp));
    u_R10 = 1; kC_R10 = 0; kEQ_R10 = 3.207411e-18; kM_R10_atp = 2.8; kM_R10_adp = 0.8; kM_R10_gtp = 0.29; kM_R10_gdp = 0.1;
  NTK__UTP_: $atp + udp -> $adp + utp; u_R11*(kC_R11*sqrt(kEQ_R11*kM_R11_atp*kM_R11_udp/kM_R11_adp/kM_R11_utp)*(atp/kM_R11_atp)*(udp/kM_R11_udp) - kC_R11/sqrt(kEQ_R11*kM_R11_atp*kM_R11_udp/kM_R11_adp/kM_R11_utp)*(adp/kM_R11_adp)*(utp/kM_R11_utp))/((1 + atp/kM_R11_atp)*(1 + udp/kM_R11_udp)*(1 + adp/kM_R11_adp)*(1 + utp/kM_R11_utp));
    u_R11 = 1; kC_R11 = 1.898937; kEQ_R11 = 1.037415; kM_R11_atp = 2.8; kM_R11_adp = 0.8; kM_R11_utp = 0.5264344; kM_R11_udp = 0.1509163;
  AK: $atp + $amp -> 2 $adp; u_R12*(kC_R12*sqrt(kEQ_R12*kM_R12_atp*kM_R12_amp/kM_R12_adp^2)*(atp/kM_R12_atp)*(amp/kM_R12_amp) - kC_R12/sqrt(kEQ_R12*kM_R12_atp*kM_R12_amp/kM_R12_adp^2)*(adp/kM_R12_adp)^2)/((1 + atp/kM_R12_atp)*(1 + amp/kM_R12_amp)*(1 + adp/kM_R12_adp)^2);
    u_R12 = 1; kC_R12 = 0; kEQ_R12 = 5.530018e-18; kM_R12_atp = 2.8; kM_R12_adp = 0.8; kM_R12_amp = 0.16;
  PFK2: $atp + fru6p -> $adp + fru26bp; u_R13*(kC_R13*sqrt(kEQ_R13*kM_R13_atp*kM_R13_fru6p/kM_R13_adp/kM_R13_fru26bp)*(atp/kM_R13_atp)*(fru6p/kM_R13_fru6p) - kC_R13/sqrt(kEQ_R13*kM_R13_atp*kM_R13_fru6p/kM_R13_adp/kM_R13_fru26bp)*(adp/kM_R13_adp)*(fru26bp/kM_R13_fru26bp))/((1 + atp/kM_R13_atp)*(1 + fru6p/kM_R13_fru6p)*(1 + adp/kM_R13_adp)*(1 + fru26bp/kM_R13_fru26bp));
    u_R13 = 1; kC_R13 = 0.0427147; kEQ_R13 = 0.0118398; kM_R13_atp = 2.8; kM_R13_adp = 0.8; kM_R13_fru6p = 0.04848827; kM_R13_fru26bp = 0.001817686;
  FBP2: $h2o + fru26bp -> $p + fru6p; u_R14*(kC_R14*sqrt(kEQ_R14*kM_R14_h2o*kM_R14_fru26bp/kM_R14_p/kM_R14_fru6p)*(h2o/kM_R14_h2o)*(fru26bp/kM_R14_fru26bp) - kC_R14/sqrt(kEQ_R14*kM_R14_h2o*kM_R14_fru26bp/kM_R14_p/kM_R14_fru6p)*(p/kM_R14_p)*(fru6p/kM_R14_fru6p))/((1 + h2o/kM_R14_h2o)*(1 + fru26bp/kM_R14_fru26bp)*(1 + p/kM_R14_p)*(1 + fru6p/kM_R14_fru6p));
    u_R14 = 1; kC_R14 = 0.0427147; kEQ_R14 = 147.441; kM_R14_p = 5; kM_R14_h2o = 1; kM_R14_fru6p = 0.04848827; kM_R14_fru26bp = 0.001817686;
  PFK1: $atp + fru6p -> $adp + fru16bp; u_R15*(kC_R15*sqrt(kEQ_R15*kM_R15_atp*kM_R15_fru6p/kM_R15_adp/kM_R15_fru16bp)*(atp/kM_R15_atp)*(fru6p/kM_R15_fru6p) - kC_R15/sqrt(kEQ_R15*kM_R15_atp*kM_R15_fru6p/kM_R15_adp/kM_R15_fru16bp)*(adp/kM_R15_adp)*(fru16bp/kM_R15_fru16bp))/((1 + atp/kM_R15_atp)*(1 + fru6p/kM_R15_fru6p)*(1 + adp/kM_R15_adp)*(1 + fru16bp/kM_R15_fru16bp));
    u_R15 = 1; kC_R15 = 25.54765; kEQ_R15 = 9.174308; kM_R15_atp = 2.8; kM_R15_adp = 0.8; kM_R15_fru6p = 0.04848827; kM_R15_fru16bp = 1.40847;
  FBP1: $h2o + fru16bp -> $p + fru6p; u_R16*(kC_R16*sqrt(kEQ_R16*kM_R16_h2o*kM_R16_fru16bp/kM_R16_p/kM_R16_fru6p)*(h2o/kM_R16_h2o)*(fru16bp/kM_R16_fru16bp) - kC_R16/sqrt(kEQ_R16*kM_R16_h2o*kM_R16_fru16bp/kM_R16_p/kM_R16_fru6p)*(p/kM_R16_p)*(fru6p/kM_R16_fru6p))/((1 + h2o/kM_R16_h2o)*(1 + fru16bp/kM_R16_fru16bp)*(1 + p/kM_R16_p)*(1 + fru6p/kM_R16_fru6p));
    u_R16 = 1; kC_R16 = 22.30795; kEQ_R16 = 0.1902784; kM_R16_p = 5; kM_R16_h2o = 1; kM_R16_fru6p = 0.04848827; kM_R16_fru16bp = 1.40847;
  ALD: fru16bp -> grap + dhap; u_R17*(kC_R17*sqrt(kEQ_R17*kM_R17_fru16bp/kM_R17_grap/kM_R17_dhap)*(fru16bp/kM_R17_fru16bp) - kC_R17/sqrt(kEQ_R17*kM_R17_fru16bp/kM_R17_grap/kM_R17_dhap)*(grap/kM_R17_grap)*(dhap/kM_R17_dhap))/((1 + fru16bp/kM_R17_fru16bp)*(1 + grap/kM_R17_grap)*(1 + dhap/kM_R17_dhap));
    u_R17 = 1; kC_R17 = 5.787218; kEQ_R17 = 0.0001015686; kM_R17_fru16bp = 1.40847; kM_R17_grap = 0.002726948; kM_R17_dhap = 0.05039856;
  TPI: dhap -> grap; u_R18*(kC_R18*sqrt(kEQ_R18*kM_R18_dhap/kM_R18_grap)*(dhap/kM_R18_dhap) - kC_R18/sqrt(kEQ_R18*kM_R18_dhap/kM_R18_grap)*(grap/kM_R18_grap))/((1 + dhap/kM_R18_dhap)*(1 + grap/kM_R18_grap));
    u_R18 = 1; kC_R18 = 3.472331; kEQ_R18 = 0.05632106; kM_R18_grap = 0.002726948; kM_R18_dhap = 0.05039856;
  GAPDH: $nad + $p + grap -> $nadh + $h + bpg13; u_R19*(kC_R19*sqrt(kEQ_R19*kM_R19_nad*kM_R19_p*kM_R19_grap/kM_R19_nadh/kM_R19_h/kM_R19_bpg13)*(nad/kM_R19_nad)*(p/kM_R19_p)*(grap/kM_R19_grap) - kC_R19/sqrt(kEQ_R19*kM_R19_nad*kM_R19_p*kM_R19_grap/kM_R19_nadh/kM_R19_h/kM_R19_bpg13)*(nadh/kM_R19_nadh)*(h/kM_R19_h)*(bpg13/kM_R19_bpg13))/((1 + nad/kM_R19_nad)*(1 + p/kM_R19_p)*(1 + grap/kM_R19_grap)*(1 + nadh/kM_R19_nadh)*(1 + h/kM_R19_h)*(1 + bpg13/kM_R19_bpg13));
    u_R19 = 1; kC_R19 = 34.72331; kEQ_R19 = 0.08564015; kM_R19_nad = 1.22; kM_R19_nadh = 0.00056; kM_R19_p = 5; kM_R19_h = 1; kM_R19_grap = 0.002726948; kM_R19_bpg13 = 2.443902;
  PGK: $adp + bpg13 -> $atp + pg3; u_R20*(kC_R20*sqrt(kEQ_R20*kM_R20_adp*kM_R20_bpg13/kM_R20_atp/kM_R20_pg3)*(adp/kM_R20_adp)*(bpg13/kM_R20_bpg13) - kC_R20/sqrt(kEQ_R20*kM_R20_adp*kM_R20_bpg13/kM_R20_atp/kM_R20_pg3)*(atp/kM_R20_atp)*(pg3/kM_R20_pg3))/((1 + adp/kM_R20_adp)*(1 + bpg13/kM_R20_bpg13)*(1 + atp/kM_R20_atp)*(1 + pg3/kM_R20_pg3));
    u_R20 = 1; kC_R20 = 16.20421; kEQ_R20 = 7.232159; kM_R20_atp = 2.8; kM_R20_adp = 0.8; kM_R20_bpg13 = 2.443902; kM_R20_pg3 = 4.851451;
  PGM: pg3 -> pg2; u_R21*(kC_R21*sqrt(kEQ_R21*kM_R21_pg3/kM_R21_pg2)*(pg3/kM_R21_pg3) - kC_R21/sqrt(kEQ_R21*kM_R21_pg3/kM_R21_pg2)*(pg2/kM_R21_pg2))/((1 + pg3/kM_R21_pg3)*(1 + pg2/kM_R21_pg2));
    u_R21 = 1; kC_R21 = 6.944661; kEQ_R21 = 0.1882073; kM_R21_pg3 = 4.851451; kM_R21_pg2 = 0.8771945;
  EN: pg2 -> $h2o + pep; u_R22*(kC_R22*sqrt(kEQ_R22*kM_R22_pg2/kM_R22_h2o/kM_R22_pep)*(pg2/kM_R22_pg2) - kC_R22/sqrt(kEQ_R22*kM_R22_pg2/kM_R22_h2o/kM_R22_pep)*(h2o/kM_R22_h2o)*(pep/kM_R22_pep))/((1 + pg2/kM_R22_pg2)*(1 + h2o/kM_R22_h2o)*(1 + pep/kM_R22_pep));
    u_R22 = 1; kC_R22 = 11.57444; kEQ_R22 = 0.05516628; kM_R22_h2o = 1; kM_R22_pg2 = 0.8771945; kM_R22_pep = 0.04648978;
  PK: $adp + pep -> $atp + pyr; u_R23*(kC_R23*sqrt(kEQ_R23*kM_R23_adp*kM_R23_pep/kM_R23_atp/kM_R23_pyr)*(adp/kM_R23_adp)*(pep/kM_R23_pep) - kC_R23/sqrt(kEQ_R23*kM_R23_adp*kM_R23_pep/kM_R23_atp/kM_R23_pyr)*(atp/kM_R23_atp)*(pyr/kM_R23_pyr))/((1 + adp/kM_R23_adp)*(1 + pep/kM_R23_pep)*(1 + atp/kM_R23_atp)*(1 + pyr/kM_R23_pyr));
    u_R23 = 1; kC_R23 = 56.43088; kEQ_R23 = 1.343474; kM_R23_atp = 2.8; kM_R23_adp = 0.8; kM_R23_pep = 0.04648978; kM_R23_pyr = 0.01714377;
  PEPCK: gtp + oaa -> gdp + $co2 + pep; u_R24*(kC_R24*sqrt(kEQ_R24*kM_R24_gtp*kM_R24_oaa/kM_R24_gdp/kM_R24_co2/kM_R24_pep)*(gtp/kM_R24_gtp)*(oaa/kM_R24_oaa) - kC_R24/sqrt(kEQ_R24*kM_R24_gtp*kM_R24_oaa/kM_R24_gdp/kM_R24_co2/kM_R24_pep)*(gdp/kM_R24_gdp)*(co2/kM_R24_co2)*(pep/kM_R24_pep))/((1 + gtp/kM_R24_gtp)*(1 + oaa/kM_R24_oaa)*(1 + gdp/kM_R24_gdp)*(1 + co2/kM_R24_co2)*(1 + pep/kM_R24_pep));
    u_R24 = 1; kC_R24 = 0; kEQ_R24 = 3.102802e-17; kM_R24_gtp = 0.29; kM_R24_gdp = 0.1; kM_R24_co2 = 5; kM_R24_pep = 0.04648978; kM_R24_oaa = 0.01;
  PEPCK_{mito}: 5 + 5 -> 5 + 5 + 5 + 5 + 5 + 5; ;
    u_R25 = 1; kC_R25 = 23624.55; kEQ_R25 = 2.426561e9; kM_R25_co2_{mito} = 5; kM_R25_oaa_{mito} = 0.0002462127; kM_R25_pep_{mito} = 0.05305823; kM_R25_gtp_{mito} = 0.3011829; kM_R25_gdp_{mito} = 0.08881709; kM_R25_nadh_{mito} = 0.24; kM_R25_nad_{mito} = 0.98; kM_R25_h_{mito} = 1;
  PC: 5 + 5 + 5 -> 5 + 5 + 5; ;
    u_R26 = 1; kC_R26 = 869.2435; kEQ_R26 = 4.157874e-9; kM_R26_co2_{mito} = 5; kM_R26_p_{mito} = 5; kM_R26_oaa_{mito} = 0.0002462127; kM_R26_pyr_{mito} = 0.003364733; kM_R26_atp_{mito} = 2.8; kM_R26_adp_{mito} = 0.8;
  LDH: $nadh + $h + pyr -> $nad + lac; u_R27*(kC_R27*sqrt(kEQ_R27*kM_R27_nadh*kM_R27_h*kM_R27_pyr/kM_R27_nad/kM_R27_lac)*(nadh/kM_R27_nadh)*(h/kM_R27_h)*(pyr/kM_R27_pyr) - kC_R27/sqrt(kEQ_R27*kM_R27_nadh*kM_R27_h*kM_R27_pyr/kM_R27_nad/kM_R27_lac)*(nad/kM_R27_nad)*(lac/kM_R27_lac))/((1 + nadh/kM_R27_nadh)*(1 + h/kM_R27_h)*(1 + pyr/kM_R27_pyr)*(1 + nad/kM_R27_nad)*(1 + lac/kM_R27_lac));
    u_R27 = 1; kC_R27 = 1.465727e-8; kEQ_R27 = 8.895062e-19; kM_R27_nad = 1.22; kM_R27_nadh = 0.00056; kM_R27_h = 1; kM_R27_pyr = 0.01714377; kM_R27_lac = 1.808252e-6;
  LacT: -> lac; ;
    u_R28 = 1; kC_R28 = 50.67239; kEQ_R28 = 1.568519e-6; kM_R28_lac = 1.808252e-6; kM_R28_lac_{ext} = 1.2;
  PyrT: pyr -> 5; ;
    u_R29 = 1; kC_R29 = 2.801602; kEQ_R29 = 1.040908e-10; kM_R29_pyr = 0.01714377; kM_R29_pyr_{mito} = 0.003364733;
  PepT: 5 -> pep; ;
    u_R30 = 1; kC_R30 = 24.82278; kEQ_R30 = 115081.6; kM_R30_pep = 0.04648978; kM_R30_pep_{mito} = 0.05305823;
  PDH: 5 + 5 + 5 -> 5 + 5 + 5 + 5; ;
    u_R31 = 1; kC_R31 = 5776.425; kEQ_R31 = 1.351828e12; kM_R31_co2_{mito} = 5; kM_R31_acoa_{mito} = 0.04; kM_R31_pyr_{mito} = 0.003364733; kM_R31_coa_{mito} = 0.055; kM_R31_nadh_{mito} = 0.24; kM_R31_nad_{mito} = 0.98; kM_R31_h_{mito} = 1;
  CS: 5 + 5 + 5 -> 5 + 5; ;
    u_R32 = 1; kC_R32 = 86.7238; kEQ_R32 = 1.897244e16; kM_R32_oaa_{mito} = 0.0002462127; kM_R32_acoa_{mito} = 0.04; kM_R32_cit_{mito} = 0.32; kM_R32_coa_{mito} = 0.055; kM_R32_h2o_{mito} = 1;
  NDK_{mito}: 5 + 5 -> 5 + 5; ;
    u_R33 = 1; kC_R33 = 178.1467; kEQ_R33 = 0.8886706; kM_R33_atp_{mito} = 2.8; kM_R33_adp_{mito} = 0.8; kM_R33_gtp_{mito} = 0.3011829; kM_R33_gdp_{mito} = 0.08881709;
  oaa_{flx}: -> 5; ;
    u_R34 = 1; kC_R34 = 0; kEQ_R34 = 3.871013e-28; kM_R34_oaa_{mito} = 0.0002462127;
  acoa_{flx}: 5 -> ; ;
    u_R35 = 1; kC_R35 = 0; kEQ_R35 = 3.780286e-11; kM_R35_acoa_{mito} = 0.04;
  vcit_{flx}: 5 -> ; ;
    u_R36 = 1; kC_R36 = 0; kEQ_R36 = 1.153652e-15; kM_R36_cit_{mito} = 0.32;
end
