// SBML level 2 version 2

model Escherichia_coli_iAF1260()

  // Compartments:
  compartment compartment;

  // Species:
  species aspp in compartment = 0.007043892;
  species asa in compartment = 0.06615949;
  species hs in compartment = 0.4320496;
  species hsp in compartment = 0.588002;
  species $phos in compartment = 0.1007442;
  species $thr in compartment = 1.9;
  species $asp in compartment = 1.9;
  species $nadp in compartment = 0.1000029;
  species $nadph in compartment = 1.9;
  species $adp in compartment = 0.1002094;
  species $atp in compartment = 9.5;

  // Reactions:
  vak: $asp + $atp -> aspp + $adp; u_R1*(thr/kA_R1_thr)/(1 + thr/kA_R1_thr)*(kC_R1*sqrt(kEQ_R1*kM_R1_asp*kM_R1_atp/kM_R1_aspp/kM_R1_adp)*(asp/kM_R1_asp)*(atp/kM_R1_atp) - kC_R1/sqrt(kEQ_R1*kM_R1_asp*kM_R1_atp/kM_R1_aspp/kM_R1_adp)*(aspp/kM_R1_aspp)*(adp/kM_R1_adp))/((1 + asp/kM_R1_asp)*(1 + atp/kM_R1_atp)*(1 + aspp/kM_R1_aspp)*(1 + adp/kM_R1_adp));  // modifiers: thr
    u_R1 = 1; kC_R1 = 0.005301354; kEQ_R1 = 0.0001301995; kM_R1_aspp = 0.007043892; kM_R1_asp = 1.9; kM_R1_adp = 0.1002094; kM_R1_atp = 9.5; kA_R1_thr = 1.9;
  vasd: aspp + $nadph -> asa + $phos + $nadp; u_R2*(kC_R2*sqrt(kEQ_R2*kM_R2_aspp*kM_R2_nadph/kM_R2_asa/kM_R2_phos/kM_R2_nadp)*(aspp/kM_R2_aspp)*(nadph/kM_R2_nadph) - kC_R2/sqrt(kEQ_R2*kM_R2_aspp*kM_R2_nadph/kM_R2_asa/kM_R2_phos/kM_R2_nadp)*(asa/kM_R2_asa)*(phos/kM_R2_phos)*(nadp/kM_R2_nadp))/((1 + aspp/kM_R2_aspp)*(1 + nadph/kM_R2_nadph)*(1 + asa/kM_R2_asa)*(1 + phos/kM_R2_phos)*(1 + nadp/kM_R2_nadp));
    u_R2 = 1; kC_R2 = 9.652507e-5; kEQ_R2 = 151.2494; kM_R2_aspp = 0.007043892; kM_R2_asa = 0.06615949; kM_R2_phos = 0.1007442; kM_R2_nadp = 0.1000029; kM_R2_nadph = 1.9;
  vhdh: asa + $nadph -> hs + $nadp; u_R3*(thr/kA_R3_thr)/(1 + thr/kA_R3_thr)*(asp/kA_R3_asp)/(1 + asp/kA_R3_asp)*(kC_R3*sqrt(kEQ_R3*kM_R3_asa*kM_R3_nadph/kM_R3_hs/kM_R3_nadp)*(asa/kM_R3_asa)*(nadph/kM_R3_nadph) - kC_R3/sqrt(kEQ_R3*kM_R3_asa*kM_R3_nadph/kM_R3_hs/kM_R3_nadp)*(hs/kM_R3_hs)*(nadp/kM_R3_nadp))/((1 + asa/kM_R3_asa)*(1 + nadph/kM_R3_nadph)*(1 + hs/kM_R3_hs)*(1 + nadp/kM_R3_nadp));  // modifiers: thr, asp
    u_R3 = 1; kC_R3 = 0.01060271; kEQ_R3 = 1.144368; kM_R3_asa = 0.06615949; kM_R3_hs = 0.4320496; kM_R3_nadp = 0.1000029; kM_R3_nadph = 1.9; kA_R3_thr = 1.9; kA_R3_asp = 1.9;
  vtsy: hsp -> $phos + $thr; u_R4*(kC_R4*sqrt(kEQ_R4*kM_R4_hsp/kM_R4_phos/kM_R4_thr)*(hsp/kM_R4_hsp) - kC_R4/sqrt(kEQ_R4*kM_R4_hsp/kM_R4_phos/kM_R4_thr)*(phos/kM_R4_phos)*(thr/kM_R4_thr))/((1 + hsp/kM_R4_hsp)*(1 + phos/kM_R4_phos)*(1 + thr/kM_R4_thr));
    u_R4 = 1; kC_R4 = 4.374185e-5; kEQ_R4 = 988.6213; kM_R4_hsp = 0.588002; kM_R4_phos = 0.1007442; kM_R4_thr = 1.9;
  vhk: hs + $atp -> hsp + $adp; u_R5*(thr/kA_R5_thr)/(1 + thr/kA_R5_thr)*(kC_R5*sqrt(kEQ_R5*kM_R5_hs*kM_R5_atp/kM_R5_hsp/kM_R5_adp)*(hs/kM_R5_hs)*(atp/kM_R5_atp) - kC_R5/sqrt(kEQ_R5*kM_R5_hs*kM_R5_atp/kM_R5_hsp/kM_R5_adp)*(hsp/kM_R5_hsp)*(adp/kM_R5_adp))/((1 + hs/kM_R5_hs)*(1 + atp/kM_R5_atp)*(1 + hsp/kM_R5_hsp)*(1 + adp/kM_R5_adp));  // modifiers: thr
    u_R5 = 1; kC_R5 = 0.005301341; kEQ_R5 = 0.04779642; kM_R5_hs = 0.4320496; kM_R5_hsp = 0.588002; kM_R5_adp = 0.1002094; kM_R5_atp = 9.5; kA_R5_thr = 1.9;
  vnadph_endo: $nadph -> $nadp; u_R6*(kC_R6*sqrt(kEQ_R6*kM_R6_nadph/kM_R6_nadp)*(nadph/kM_R6_nadph) - kC_R6/sqrt(kEQ_R6*kM_R6_nadph/kM_R6_nadp)*(nadp/kM_R6_nadp))/((1 + nadph/kM_R6_nadph)*(1 + nadp/kM_R6_nadp));
    u_R6 = 1; kC_R6 = 8.544462e-5; kEQ_R6 = 0.1752363; kM_R6_nadp = 0.1000029; kM_R6_nadph = 1.9;
  vatpase: $atp -> $phos + $adp; u_R7*(kC_R7*sqrt(kEQ_R7*kM_R7_atp/kM_R7_phos/kM_R7_adp)*(atp/kM_R7_atp) - kC_R7/sqrt(kEQ_R7*kM_R7_atp/kM_R7_phos/kM_R7_adp)*(phos/kM_R7_phos)*(adp/kM_R7_adp))/((1 + atp/kM_R7_atp)*(1 + phos/kM_R7_phos)*(1 + adp/kM_R7_adp));
    u_R7 = 1; kC_R7 = 1.252793e-5; kEQ_R7 = 3.227306; kM_R7_phos = 0.1007442; kM_R7_adp = 0.1002094; kM_R7_atp = 9.5;
end
